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Pr_30 := 1 - ppois(30, 25) = 0.136691
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Pr_80 := ppois(80, 100) = 0.0226492
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t := 24
x := 653
λ := 25  # 25 ordre i timen ift. opgaven
λ_est := x/t = 27.2083
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z := (x - t*λ)/sqrt(t*λ) = 2.16372
H_0 == λ == 25/timen
H_1 == λ ≠ 25/timen
pnorm(z, 0, 1) = 0.984757
p := 2*(1 - pnorm(z, 0, 1)) = 0.0304862
# p < 0.05 derfor forkastes null hypotesen
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# Læs i bog. Tabel side 105. 0.975, uendelig frihedsgrader, 1.96
a := x + 1.96^2/2 = 654.921
b := 1.96*sqrt(x + 1.96^2/4) = 50.1224
λ_min := 1/t*(a - b) = 25.1999
λ_max := 1/t*(a + b) = 29.3768
# 95% konfidensinterval:
# [25.2; 29.377]
