# Tæthedsfunktioner
# Gyldighed
integral(f_X(x), x = -∞ .. ∞) == 1
# CDF til PDF
f_X(x) == d/dx(F_x(x))
# PMF til CDF
F_X(x_i) == sum(f_X(x), x = -1 .. x_i)
# PDF til CDF
F_X(x_i) == integral(f_X(u), u = -∞ .. x_i)
# Marginale tæthedsfunktioner
f_X(x) == P(X == x) == sum(P(X == x, Y == y), y) == sum(f_XY(x, y), y)
f_Y(y) == P(Y == y) == sum(P(X == x, Y == y), x) == sum(f_XY(x, y), x)
# Sandsynlighed (pdf)
Pr(X > x) == 1 - F_X(x)
N == N_1k + N_10k + N_100k
# Betinget sandsynlighed
f_X∥Y(x∥y) == f_XY(x, y)/f_Y(y) == Pr(X == x*∥Y == y)
# Middelværdi
# Forventningsværdi (pdf)
E*[X] == conj(X) == μ_X == integral(x_i*f_X(x), x = -∞ .. ∞)
# Forventningsværdi (pmf)
E*[X] == sum(x_i*E(X_i), i = 1 .. n) == sum(x_i*f_X(x == x_i), i = 1 .. n)
# Uniform fordeling
E*[X] == (a + b)/2
# Ensemble middelværdi
μ_X(t) == E*[X(t)] == integral(x(t)*f_X(x(t)), x = -∞ .. ∞)*t
μ_X(n) == E*[X(n)] == integral(x(n)*f_X(x(n)), x = -∞ .. ∞)*n
# Tidslig middelværdi
μ_xi == X_i*_T == limit(1/T*integral(x_i(t), t = -T/2 .. T/2), T → ∞)
μ_X(t) == E*[X(t)] == E*[a*t]
# Varians
# Varians (pdf)
var(x) == σ_X^2 == E*[x^2] - E*[x]^2 == integral(x_i^2*f_X(x), x = -∞ .. ∞) - E*[x]^2
# Varians (pmf)
E*[X^2] == sum(x_i^2*E(X_i), i = 1 .. n) == sum(x_i^2*f_X(x == x_i), i = 1 .. n)
μ_X(t) == E*[X(t)] == E*[a*t]
# Normal fordeling
σ_x^2 == E*[x^2] - E*[x]^2
E*[X_n] == E*[2*w(n) - 1] == 2*E*[w(n)] - 1
E*[w(n)] == (a + b)/2
# Uniform fordeling
var(w(n)) == (b - a)^2/12
var(2*w(n) - 1) == 2^2*((b - a + 1)^2 - 1)/12
var(X(t)) == var(a*t) == t^2*var(a)
# Ensemble varians
E*[3*x^2] == 3*E*[X^2]
var(X(t)) == σ_X^2*t == E*[X(t) - μ_X(t)^2]
var(X(n)) == σ_X^2*n == E*[X(n) - μ_X(n)^2]
# Varians af en konstant
Var(k) == E*[k^2] - E*[k]^2 == k^2 - k^2 == 0
# Standardafvigelse
# Standardafvigelse
σ_x == sqrt(E*[x^2] - E*[x]^2)
σ_X == sqrt(σ_X^2)
# Hypoteser
# Estimator (middelværdi)
δ == conj(x_1) - conj(x_2)*~N(0, σ^2/n_1 + σ^2/n_2)
# Estimator( varians)
s^2 == 1/(n_1 + n_2 - 2)*((n_1 - 1)*s_1^2 + (n_2 - 1)*s_2^2)
σ == sqrt(s^2)
# Test size
t == δ/(s*sqrt(1/n_1 + 1/n_2))
# P value
p_val == 2*(1 - t_cdf(|t|, n_1 + n_2 - 2))
# 95% konfidens interval
δ_lower == (x_1 - x_2) - t_0*s*sqrt(1/n_1 + 1/n_2)
δ_upper == (x_1 - x_2) + t_0*s*sqrt(1/n_1 + 1/n_2)
# Korrelation
ρ == E*[(X - conj(X))/σ_X*(Y - conj(conj(Y)))/σ_Y] == (E*[XY] - E*[X]*E*[Y])/(σ_X*σ_Y) == cov(X, Y)/(σ_X*σ_Y)
σ_Y == sqrt(E*[Y^2] - E*[Y]^2)
# Autokorrelation
R_XX(t_1, t_2) == E*[X(t_1)*conj(X(t_2))]
X(n) := w(n)  # error: This variable is undefined. Check that the label is set correctly.
R_XX(τ) := E(X(n)*X(n - τ)) → E(w(n)*w(n - τ))
τ := 0, 1 .. 3
n := 1, 2 .. 10
R_XX(τ) → [E(w(n)^2); E(w(n)*w(n - 1)); E(w(n)*w(n - 2)); E(w(n)*w(n - 3))]
# Sandsynlighed
# Prior
Pr(A) == 0.001
Pr(conj(A)) == 1 - Pr(A)
Pr(B)
# Likelihood
Pr(B∥A) == 0.92
Pr(B∥*A') == 1 - Pr(Pr(B∥A))
Pr(B'∥A) == 0.98
Pr(B'∥*A') == 1 - Pr(B'∥A)
# Posterior
Pr(B'∥A) == Pr(A∥B')*Pr(B')/Pr(A)
# Total Probabilty (Sum Rule)
Pr(B) == Pr(B∩A) + Pr(B∩*conj(A)) == Pr(B∥A)*Pr(A) + Pr(B∥*conj(A))*Pr(conj(A))
Pr(A) == Pr(A∩B) + Pr(A∩*conj(B)) == Pr(A∥B)*Pr(B) + Pr(A∥*conj(B))*Pr(conj(B))
# Total Probabilty (Bayes Rule)
Pr(A∥*C) == Pr(C∥A)*Pr(A)/Pr(C)
# Joint Events
Pr(B∩A) == Pr(B∥A)*Pr(A)
# Relative Frequency Approach
N_A == 28131
N_B == 29785
N == N_A + N_B == 57916
28131 + 29785 = 57916
Pr(A) == N_A/N
# Binomial
Pr_n(k) == n!/(k!*(n - k)!)*p^k*q^(n - k) == [n; k]*p^k*q^(n - k)
# Ensemble
# Ensemble mean
μ_X(x) == E*[X(n)] == (a + b)/2
# Ensemble variance
var(x) == E*[X(n)^2] - E*[X(n)]^2 == (b - a)^2/12
# Statistik
# Known variance
μ_est == conj(conj(x)) == 1/n*sum(X_i, i = 1 .. n)
z == (conj(x) - μ_0)/(σ*sqrt(n))
p == 2*|1 - Φ(|z|)|
μ_lower == conj(x) - 1.96*σ/sqrt(n)
μ_upper == conj(x) + 1.96*σ/sqrt(n)
s == sqrt(s^2)
z == (conj(x_1) - conj(x_2))/(σ*sqrt(1/n_1 + 1/n_2))
# Unknown variance
μ_est == conj(x) == 1/n*sum(X_i, i = 1 .. n)
s^2 == 1/(n - 1)*sum((x_i - conj(x))^2, i = 1 .. n)
t == (conj(x) - μ_0)/(s*sqrt(n))
p == 2*|1 - t_cdf(|t|)|
t_0 == tinv((1 - 0.05)/2, n - 1)
μ_lower == conj(x) - t_0*s/sqrt(n)
μ_upper == conj(x) + t_0*s/sqrt(n)
# Poisson
H_0
λ == λ_0
H_1
λ! == λ_0
λ == x/t
z == (x - t*λ)/sqrt(t*λ)
z == (X - E*[X])/sqrt(var(X)) == (X - t*λ)/sqrt(t*λ)  # (normal approximation)
p == 2*|1 - Φ(|z|)|
λ_lower == 1/t*[x + 1.96^2/2 - 1.96*sqrt(x + 1.96^2/4)]
λ_upper == 1/t*[x + 1.96^2/2 + 1.96*sqrt(x + 1.96^2/4)]
# Binomial
p_est == x/n
z == (x - n*p_0)/sqrt(n*p_0(1 - p_0))
p == 2*|1 - Φ(|z|)|
p_lower == 1/(n + 1.96^2)*[x + 1.96^2/2 - 1.96*sqrt(x(n - x)/n + 1.96^2/4)]
p_upper == 1/(n + 1.96^2)*[x + 1.96^2/2 + 1.96*sqrt(x(n - x)/n + 1.96^2/4)]
# Regression
α == conj(y) - β*conj(x)  # (skæring)
β == sum((x_i - conj(x))*(y_i - conj(y)), i = 1 .. n)/sum((x_i - conj(x))^2, i = 1 .. n)  # (hældning)
ε_i == y_i - (α + βx_i)  # (residual)
s_r^2 == 1/(n - 2)*sum((y_i - (α + βx_i))^2, i = 1 .. n) == 1/(n - 2)*sum(ε_i^2, i = 1 .. n)
δ_est == conj(x_1) - conj(x_2)
δ_lower == (conj(x_1) - conj(x_2)) - 1.96*σ*sqrt(1/n_1 + 1/n_2)
# Konfidensinterval for hældningen β
β_lower == β - t_o*sqrt(S_r^2/sum((t_i - conj(t))^2, i = 1 .. n))
β_upper == β + t_o*sqrt(S_r^2/sum((t_i - conj(t))^2, i = 1 .. n))
